*********************************************************************
** Information
*********************************************************************
**
** written by Maria Holland
**
** last modified: 2016/09/05
**
** Generated by: Abaqus/CAE 6.9-EF2
**
*Heading
12x12 square in xy plane (thickness=0.5) with pressure applied to a circular subregion; WITH MATERIAL ORIENTATIONS
**
**
*Preprint, echo=NO, model=NO, history=NO, contact=NO
**
**
*********************************************************************
** Node definitions
*********************************************************************
**
*Part, name=PART-1
*Node
      1,           0.,           0.,           0.
      2,          0.5,           0.,           0.
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**
**
*********************************************************************
** Element definitions
*********************************************************************
**
*Element, type=C3D8
   1,    1,    2,   27,   26,  626,  627,  652,  651
   2,    2,    3,   28,   27,  627,  628,  653,  652
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**
*Nset, nset=ALL, generate
    1,  1875,     1
*Elset, elset=ALL, generate
    1,  1152,     1
**
*Orientation, name=ORI, system=user
**
** Section: Section-1-ALL
*Solid Section, elset=ALL, material=MAT, orientation=ORI
,
*End Part
**
**
*********************************************************************
** Assembly and Instance
*********************************************************************
**
*Assembly, name=Assembly
**
*Instance, name=Part-1-1, part=Part-1
*End Instance
**
**
*********************************************************************
** Boundary Condition Sets
*********************************************************************
**
*Nset, nset=FIXED, instance=PART-1-1
   1,   2,   3,   4,   5,   6
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**
*Elset, elset=PRESSURE_SET, internal, instance=PART-1-1, generate
   1,  576,    1
*Surface, type=ELEMENT, name=PRESSURE_SURFACE, internal
PRESSURE_SET, S1
**
*Elset, elset=ALL, internal, instance=PART-1-1
    1,  1152,     1
**
*End Assembly
**
**
*********************************************************************
** Material
*********************************************************************
**
*Material, name=MAT
*Depvar
    ?,
*User Material, constants=?, unsymm
    ?, ?
*Initial Conditions, Type=Solution, User
**
**
*********************************************************************
** Boundary Conditions
*********************************************************************
**
** Name: EBC Type: Symmetry/Antisymmetry/Encastre
*Boundary
FIXED, PINNED
**
**
*********************************************************************
** Step
*********************************************************************
**
*Step, name=pressure, nlgeom=YES, inc=100000
*Static
0.1, 10.5, 0.01, 10.
**
*Amplitude, name=Amp-1
   0.,   0.,     2.,   1.,     10.,   1.
**
** Name: PressureLoad   Type: Pressure
*Dsload, amplitude=Amp-1
PRESSURE_SURFACE, P, 0.0048
**
**
*Controls, reset
*Controls, parameters=field, field=displacement
1e-12, , , , 1e-10, , , ,
**
**
*********************************************************************
** Outputs
*********************************************************************
**
*Restart, write, frequency=0
**
** FIELD OUTPUT: F-Output-1
*Output, field
*Node Output
COORD,
**
** FIELD OUTPUT: F-Output-2
*Element Output, directions=YES
EVOL, SDV
**
** FIELD OUTPUT: F-Output-3
*Output, field, variable=PRESELECT
**
** HISTORY OUTPUT: H-Output-1
*Output, history, variable=PRESELECT
**
** HISTORY OUTPUT: H-Output-2
*Element Output, elset=ALL
SDV
**
*End Step
