*********************************************************************
** Information
*********************************************************************
**
** written by Maria Holland
**
** last modified: 2016/09/05
**
** Generated by: Abaqus/CAE 6.9-EF2
**
*Heading
Muffin (height=3) with pinned EBC on lower part
**
**
*Preprint, echo=NO, model=NO, history=NO, contact=NO
**
**
*********************************************************************
** Node definitions
*********************************************************************
**
*Part, name=Part-1
**
*Node
      1,   2.41481447,           0., -0.647047639
      2,   2.16506362,           0.,        -1.25
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**
**
*********************************************************************
** Element definitions
*********************************************************************
**
*Element, type=C3D8
   1,  192,   74,   49,   91,  484,  366,  341,  383
   2,  110,   75,   17,   42,  402,  367,  309,  334
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**
*Nset, nset=ALL, generate
    1,  2628,     1
*Elset, elset=ALL, generate
    1,  2136,     1
** Section: Section-1
*Solid Section, elset=ALL, material=MAT
,
*End Part
**
**
*********************************************************************
** Assembly and Instance
*********************************************************************
**
*Assembly, name=Assembly
**
*Instance, name=Part-1-1, part=Part-1
*End Instance
**
**
*********************************************************************
** Boundary Conditions
*********************************************************************
**
*Nset, nset=SIDES, internal, instance=PART-1-1
    1,    2,    3,    4,    5,    6
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*Nset, nset=BOTTOM, generate, internal, instance=PART-1-1
  1,  292,   1
**
*End Assembly
**
**
*********************************************************************
** Material
*********************************************************************
**
*Material, name=MAT
*Depvar
    3,
*User Material, constants=3, unsymm
    0.577, 0.385, 0.002
*Initial Conditions, Type=Solution, User
**
**
*********************************************************************
** Boundary Conditions
*********************************************************************
**
** Name: SIDES Type: Symmetry/Antisymmetry/Encastre
*Boundary
SIDES, PINNED
**
** Name: BOTTOM Type: Symmetry/Antisymmetry/Encastre
*Boundary
BOTTOM, PINNED
**
**
*********************************************************************
** Step
*********************************************************************
**
*Step, name=Step-1, nlgeom=YES, inc=10000
*Static
10, 400., 1, 10.
**
**
*********************************************************************
** Outputs
*********************************************************************
**
*Restart, write, frequency=0
**
** FIELD OUTPUT: F-Output-1
*Output, field
*Node Output
COORD,
**
** FIELD OUTPUT: F-Output-2
*Element Output, directions=YES
EVOL, SDV
**
** FIELD OUTPUT: F-Output-3
*Output, field, variable=PRESELECT
**
** HISTORY OUTPUT: H-Output-1
*Output, history, variable=PRESELECT
**
** HISTORY OUTPUT: H-Output-2
*Element Output, elset=Part-1-1.ALL
SDV
**
*End Step
