*********************************************************************
** Information
*********************************************************************
**
** written by Maria Holland
**
** last modified: 2016/09/05
**
** Generated by: Abaqus/CAE 6.9-EF2
**
*Heading
Bicep muscle and tendon pulled axially
**
**
*Preprint, echo=NO, model=NO, history=NO, contact=NO
**
**
*********************************************************************
** Node definitions
*********************************************************************
**
*Part, name=Part-1
**
*Node
      1,  -12.5825872,   0.44621101,   4.34391594
      2,  -12.3425808,  0.751913011,   4.21634579
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**
**
*********************************************************************
** Element definitions
*********************************************************************
**
*Element, type=C3D4
    1,  334,  158,  154,  151
    2,  334,  139,  151,  154
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**
**
*********************************************************************
** Sections and Part
*********************************************************************
**
*Elset, elset=SET-1, internal, generate
 1, 2423, 1
*Elset, elset=SET-2, internal, generate
 2424, 11816, 1
*Elset, elset=ALL, internal, generate
   1, 11816, 1
**
** Section: Section-1
*Solid Section, elset=SET-1, material=MAT-1
,
** Section: Section-2
*Solid Section, elset=SET-2, material=MAT-2
,
*End Part
**
**
*********************************************************************
** Assembly and Instance
*********************************************************************
**
*Assembly, name=Assembly
**
*Instance, name=PART-1-1, part=PART-1
*End Instance
**
**
*********************************************************************
** Boundaries
*********************************************************************
**
*Nset, nset=PULLED, internal, generate, instance=PART-1-1
   1, 387, 1
*Nset, nset=FIXED, internal, generate, instance=PART-1-1
   388, 808, 1
**
*End Assembly
**
**
*********************************************************************
** Material
*********************************************************************
**
*Material, name=MAT-1
*Depvar
    6,
*User Material, constants=8, unsymm
    1.714, 1.277, 0, 0, 1, 0, 10, 0
*Initial Conditions, Type=Solution, User
**
**
***Material, name=MAT-2
*Depvar
    6,
*User Material, constants=8, unsymm
    0.714, 0.179, 0, 0, 1, 0.25, 2, 0
*Initial Conditions, Type=Solution, User
**
**
*********************************************************************
** Boundary Conditions
*********************************************************************
**
** Name: FIXED Type: Symmetry/Antisymmetry/Encastre
*Boundary
FIXED, PINNED
**
** Name: PULLED Type: Displacement/Rotation
*Boundary
PULLED, 1, 1
PULLED, 2, 2
**
**
*********************************************************************
** Step
*********************************************************************
**
*Step, name=Step-1, nlgeom=YES, inc=100000
*Static
1, 16., 0.01, 10.
**
*Amplitude, name=Amp-1
   0.,		0.,
   10.,		10.
**
** Name: PULLED Type: Displacement/Rotation
*Boundary, amplitude=Amp-1
PULLED, 3, 3, 1.
**
**
*********************************************************************
** Outputs
*********************************************************************
**
*Restart, write, frequency=0
**
** FIELD OUTPUT: F-Output-1
*Output, field
*Node Output
COORD,
**
** FIELD OUTPUT: F-Output-2
*Element Output, directions=YES
SDV
**
** FIELD OUTPUT: F-Output-3
*Output, field, variable=PRESELECT
**
** HISTORY OUTPUT: H-Output-1
*Output, history, variable=PRESELECT
**
** HISTORY OUTPUT: H-Output-2
*Element Output, elset=PART-1-1.ALL
SDV
**
*End Step
