*********************************************************************
** Information
*********************************************************************
**
** written by Maria Holland
**
** last modified: 2016/09/05
**
** Generated by: Abaqus/CAE 6.9-EF2
**
*Heading
10x10 square in xy plane (thickness=1.0); WITH MATERIAL ORIENTATIONS
**
**
*Preprint, echo=NO, model=NO, history=NO, contact=NO
**
**
*********************************************************************
** Node definitions
*********************************************************************
**
*Part, name=Part-1
**
*Node
      1,          10.,          10.,           1.
      2,          10.,          9.5,           1.
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**
**
*********************************************************************
** Element definitions
*********************************************************************
**
*Element, type=C3D8
  1,   64,   65,   86,   85,    1,    2,   23,   22
  2,   65,   66,   87,   86,    2,    3,   24,   23
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**
*Nset, nset=ALL, generate
    1,  800,     1
*Elset, elset=ALL, generate
    1,  800,     1
**
*Orientation, name=ORI, system=user
**
** Section: Section-1
*Solid Section, elset=ALL, material=MAT, orientation=ORI
,
*End Part
**
**
*********************************************************************
** Assembly and Instance
*********************************************************************
**
*Assembly, name=Assembly
**
*Instance, name=Part-1-1, part=Part-1
*End Instance
**
**
*********************************************************************
** Boundary Conditions
*********************************************************************
**
*Nset, nset=CORNER, internal, instance=PART-1-1
   1
*Nset, nset=FIXED_YZ, internal, instance=PART-1-1
   1261
*Nset, nset=FIXED_XZ, internal, instance=PART-1-1
   21
**
*End Assembly
**
*********************************************************************
** Material
*********************************************************************
**
*Material, name=MAT
*Depvar
    ?,
*User Material, constants=?, unsymm
    ?, ?
*Initial Conditions, Type=Solution, User
**
**
*********************************************************************
** Boundary Conditions
*********************************************************************
**
** Name: CORNER Type: Symmetry/Antisymmetry/Encastre
*Boundary
CORNER, PINNED
**
** Name: FIXED_YZ Type: Displacement/Rotation
*Boundary
FIXED_YZ, 2, 3
**
** Name: FIXED_XZ Type: Displacement/Rotation
*Boundary
FIXED_XZ, 1, 1
FIXED_XZ, 3, 3
**
**
*********************************************************************
** Step
*********************************************************************
**
*Step, name=Step-1, nlgeom=YES, inc=10000
*Static
10, 400., 1, 10.
**
**
*********************************************************************
** Outputs
*********************************************************************
**
*Restart, write, frequency=0
**
** FIELD OUTPUT: F-Output-1
*Output, field
*Node Output
COORD,
**
** FIELD OUTPUT: F-Output-2
*Element Output, directions=YES
EVOL, SDV
**
** FIELD OUTPUT: F-Output-3
*Output, field, variable=PRESELECT
**
** HISTORY OUTPUT: H-Output-1
*Output, history, variable=PRESELECT
**
** HISTORY OUTPUT: H-Output-2
*Element Output, elset=ALL
SDV
**
*End Step
