*********************************************************************
** Information
*********************************************************************
**
** written by Maria Holland
**
** last modified: 2016/09/05
**
** Generated by: Abaqus/CAE 6.12-1
**
*Heading
10x10 square in xz plane (thickness=0.1)
**
**
*Preprint, echo=NO, model=NO, history=NO, contact=NO
**
**
*********************************************************************
** Node definitions
*********************************************************************
**
*Node
      1,          10.,  0.100000001,          10.
      2,          10.,           0.,          10.
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**
**
*********************************************************************
** Element definitions
*********************************************************************
**
*Element, type=C3D8
   1,   83,   84,   86,   85,    1,    2,    4,    3
   2,   85,   86,   88,   87,    3,    4,    6,    5
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**
*Nset, nset=ALL, generate
    1,  3362,     1
*Elset, elset=ALL, generate
    1,  1600,     1
** Section: Section-1
*Solid Section, elset=ALL, material=MAT
,
*System
**
**
*********************************************************************
** Boundary Condition Sets
*********************************************************************
**
*Nset, nset=CORNERS
  1,  2, 81, 82
*Nset, nset=EDGES
    1,   81,   83,  163,  165,  245
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**
**
*********************************************************************
** Material
*********************************************************************
**
*Material, name=MAT
*Depvar
    3,
*User Material, constants=6, unsymm
    0.577, 0.385, 0, 1, 0, 0.2
*Initial Conditions, Type=Solution, User
**
**
*********************************************************************
** Boundary Conditions
*********************************************************************
**
** Name: CORNERS Type: Displacement/Rotation
*Boundary
CORNERS, 1, 1
** Name: EDGES Type: Displacement/Rotation
*Boundary
EDGES, 2, 2
EDGES, 3, 3
**
**
*********************************************************************
** Step
*********************************************************************
**
*Step, name=Step-1, nlgeom=YES, inc=100000
*Static
0.01, 1., 0.001, 0.1
**
**
*********************************************************************
** Outputs
*********************************************************************
**
*Restart, write, frequency=0
**
** FIELD OUTPUT: F-Output-1
*Output, field
*Node Output
COORD,
**
** FIELD OUTPUT: F-Output-2
*Element Output, directions=YES
EVOL, SDV
**
** FIELD OUTPUT: F-Output-3
*Output, field, variable=PRESELECT
**
** HISTORY OUTPUT: H-Output-1
*Output, history, variable=PRESELECT
**
** HISTORY OUTPUT: H-Output-2
*Element Output, elset=ALL
SDV
**
*End Step
